OpenVSP model (file version 5), 4 components.
Geometry view with OpenVSP parameter names; values to 6 digits, angles in degrees, lengths in the model's unit.
Overall bounding box: X_Min=0 X_Len=1.009 Y_Min=-0.51462 Y_Len=1.02924 Z_Min=-0.0752769 Z_Len=0.226901

Fuselage "Fuselage"
  location (X Y Z) 0 0 0, rotation 0 0 0
  bounding box size 0.957427 0.100995 0.177698
  Design: Length=0.95
  cross sections:
    n  XLocPercent  YLocPercent  ZLocPercent  shape
    0  0            0            -0.00753927  rounded rectangle RoundRectXSec_Radius=0.02 RoundedRect_Height=0.072 RoundedRect_Width=0.051
    1  0.286911     0            -0.0104712   super ellipse Super_Height=0.116 Super_M=2.47571 Super_M_bot=6.89061 Super_MaxWidthLoc=0 Super_N=2.22286 Super_N_bot=8.2533 Super_TopBotSym=0 Super_Width=0.0972
    2  0.304712     0            -0.00628272  super ellipse Super_Height=0.125 Super_M=2.51269 Super_M_bot=6.89061 Super_MaxWidthLoc=0 Super_N=2.05429 Super_N_bot=8.2533 Super_TopBotSym=0 Super_Width=0.0972
    3  0.457592     0            0.0157068    super ellipse Super_Height=0.175 Super_M=2.56 Super_M_bot=6.89061 Super_MaxWidthLoc=0 Super_N=3.02357 Super_N_bot=8.2533 Super_TopBotSym=0 Super_Width=0.0972
    4  0.686911     0            0.00732984   super ellipse Super_Height=0.107936 Super_M=2 Super_M_bot=6.89061 Super_MaxWidthLoc=0 Super_N=2 Super_N_bot=8.2533 Super_TopBotSym=0 Super_Width=0.080223
    5  0.931993     0            0.00732984   super ellipse Super_Height=0.082 Super_M=2 Super_M_bot=6.89061 Super_MaxWidthLoc=0 Super_N=2 Super_N_bot=8.2533 Super_TopBotSym=0 Super_Width=0.04
    6  1            0            0.00732984   super ellipse Super_Height=0.072 Super_M=2 Super_M_bot=6.89061 Super_MaxWidthLoc=0 Super_N=2 Super_N_bot=8.2533 Super_TopBotSym=0 Super_Width=0.032

Wing "Fin", child of "Fuselage"
  location (X Y Z) 0.63959 0 0.0163934, rotation 90 0 0
  bounding box size 0.312 0.0374569 0.135231
  totals: TotalSpan=0.131472 TotalProjectedSpan=0.131472 TotalChord=0.206294 TotalArea=0.0251489 TotalAR=0.687308 MAC=0.235889
  root: chord 0.312, twist 0, NACA 4-series Camber=0 CamberLoc=0.2 ThickChord=0.12
  sections:
    n  Span       Root_Chord  Tip_Chord  Area        Sweep  Sweep_Location  Dihedral  Twist  Twist_Location  tip airfoil
    1  0.0416375  0.312       0.3063     0.0128722   0      0               0         0      0.25            as above
    2  0.00656    0.3063      0.21879    0.0017223   85.66  0               0         0      0.25            as above
    3  0.0416375  0.21879     0.107936   0.00680204  68.4   0               0         0      0.25            as above
    4  0.0416375  0.107936    0.0723     0.0037523   36.5   0               0         0      0.25            NACA 4-series Camber=0 CamberLoc=0.15 ThickChord=0.12

Wing "Wingtail", child of "Fuselage"
  location (X Y Z) 0.798 0 0.01, rotation 0 0 0
  symmetric about XZ
  bounding box size 0.211 0.371433 0.0253476
  totals: TotalSpan=0.3664 TotalProjectedSpan=0.3664 TotalChord=0.124 TotalArea=0.038922 TotalAR=3.44918 MAC=0.119025
  root: chord 0.211, twist 0, NACA 5-digit modified CamberLoc=0.2 IdealCl=0 LERadIndx=6 ThickChord=0.12 ThickLoc=0.4
  sections:
    n  Span    Root_Chord  Tip_Chord  Area       Sweep    Sweep_Location  Dihedral  Twist  Twist_Location  tip airfoil
    1  0.047   0.211       0.11       0.0075435  63.6     0               0         0      0.25            NACA 5-digit modified CamberLoc=0.423 IdealCl=0 LERadIndx=6 ThickChord=0.12 ThickLoc=0.4
    2  0.1362  0.11        0.065      0.0119175  12.7143  0               0         -2.5   0.25            NACA 4-digit modified Camber=0 CamberLoc=0.15 IdealCl=0 LERadIndx=6 ThickChord=0.08 ThickLoc=0.4

Wing "Wing", child of "Fuselage"
  location (X Y Z) 0.346228 0 -0.06, rotation 0 0 0
  symmetric about XZ
  bounding box size 0.188041 1.02924 0.0407348
  totals: TotalSpan=1.0124 TotalProjectedSpan=1.0124 TotalChord=0.1695 TotalArea=0.162492 TotalAR=6.3077 MAC=0.164232
  root: chord 0.188, twist 0, NACA 64-series A=1 IdealCl=0.4 ThickChord=0.15
  sections:
    n  Span    Root_Chord  Tip_Chord  Area       Sweep    Sweep_Location  Dihedral  Twist  Twist_Location  tip airfoil
    1  0.13    0.188       0.188      0.02444    0        0               0         0      0.25            as above
    2  0.3762  0.188       0.114      0.0568062  4.07475  0               0         2.2    0.25            NACA 64-series A=1 DeltaY=0.17507 IdealCl=0.4 ThickChord=0.15

VSPAERO settings (reference component "Wing"): Sref=0.162492 bref=1.0124 cref=0.164232 Xcg=4.70962 Ycg=-0.000359366 Zcg=-0.0545963 AlphaStart=-10 AlphaEnd=15 AlphaNpts=26 BetaStart=0 BetaEnd=0 BetaNpts=1 MachStart=0.3336 MachEnd=0 MachNpts=1 ReCref=2.278e+07 Vinf=100 Rho=0.002377
